<?xml version="1.0"?>
<propeller name="prop10x6">
  <ixx>0.000041666666</ixx>
  <!--assuming solid rod of mass 8 g-->
  <diameter unit="IN">10.0</diameter>
  <numblades> 2 </numblades>
  <gearratio>  1.0 </gearratio>
  <p_factor>   0.79 </p_factor>
  <table name="C_THRUST" type="internal">
    <tableData>
			0.0 0.0054513
			1.4 0.0054513
        </tableData>
  </table>
  <table name="C_POWER" type="internal">
    <tableData>
            0.0   0.0028
            0.1   0.0028
            0.2   0.0027
            0.3   0.0027
            0.4   0.0025
            0.5   0.0023
            0.6   0.0021
            0.7   0.0018
            0.8   0.0015
            1.0   0.0005
            1.2  -0.0008
            1.4  -0.0025
            1.6  -0.0042
        </tableData>
  </table>
  <table name="CT_MACH" type="internal">
    <tableData>
            0.85   1.0
            1.05   0.8
        </tableData>
  </table>
  <table name="CP_MACH" type="internal">
    <tableData>
            0.85   1.0
            1.05   1.8
            2.00   1.4
        </tableData>
  </table>
</propeller>
